*Heading
** Job name: Stalk_7-quarter_buckling-Folder-1 Model name: Model-1
** Generated by: Abaqus/CAE 2022.HF4
*Preprint, echo=NO, model=NO, history=YES, contact=NO
**
** PARTS
**
*Part, name=Stalk_7-pith
*Node
      1,           0.,           0.,   4.53200006
      2,           0.,   -8.3956356,   4.53200006
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*Element, type=C3D8R
 1, 11,  1,  9, 39, 40, 12, 50, 68
 2,  9,  2, 10, 39, 50, 28, 45, 68
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*Element, type=C3D4
37, 79, 11, 10,  3
38, 79, 78,  9, 11
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*Nset, nset="Pith Part", generate
  1,  83,   1
*Elset, elset="Pith Part", generate
  1,  54,   1
*Orientation, name=Ori-1
1., 0., 0., 0., 1., 0.
1, 0.
** Section: Pith Section
*Solid Section, elset="Pith Part", orientation=Ori-1, material=pith
,
*End Part
**
*Part, name=Stalk_7-rind
*Node
      1,           0.,  -9.96186638,   4.53200006
      2,           0.,   -8.3956356,   4.53200006
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*Element, type=C3D6
 1,  2,  1, 13, 17, 18, 48
 2,  4, 13,  1, 26, 48, 18
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*Element, type=C3D8R
 31,   5,   6,  14,  21,  79, 129, 248, 180
 32,  21,  14,  15,  20, 180, 248, 249, 181
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*Nset, nset="Rind Part", generate
   1,  451,    1
*Elset, elset="Rind Part", generate
   1,  210,    1
*Orientation, name=Ori-1
1., 0., 0., 0., 1., 0.
1, 0.
** Section: Rind Section
*Solid Section, elset="Rind Part", orientation=Ori-1, material=rind
,
*End Part
**
**
** ASSEMBLY
**
*Assembly, name=Assembly
**
*Instance, name=Stalk_7-pith-1, part=Stalk_7-pith
*End Instance
**
*Instance, name=Stalk_7-rind-1, part=Stalk_7-rind
*End Instance
**
*Node
      1,           0.,           0.,   55.6139984
*Node
      2, 1.17600625e-15,   10.5505362, 3.8719028e-15
*Node
      3, -2.43045855e-15,  -10.5505362, -2.06709649e-14
*Nset, nset=BottomLowerEdge, instance=Stalk_7-rind-1
   1,  62,  63,  64,  65,  66
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*Elset, elset=BottomLowerEdge, instance=Stalk_7-rind-1, generate
  35,  120,    5
*Nset, nset=BottomUpperEdge, instance=Stalk_7-rind-1
  11, 130, 131, 132, 133, 134
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*Elset, elset=BottomUpperEdge, instance=Stalk_7-rind-1, generate
 125,  210,    5
*Nset, nset="ExtraRP Set"
 3,
*Nset, nset="Front Face", instance=Stalk_7-pith-1
  4,  5,  6,  8, 17, 23, 29, 37, 38, 55, 67
*Nset, nset="Front Face", instance=Stalk_7-rind-1
  56,  57,  58,  59,  60,  61
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*Elset, elset="Front Face", instance=Stalk_7-pith-1
 16, 17, 18, 34, 35, 36
*Elset, elset="Front Face", instance=Stalk_7-rind-1
 116, 117, 118, 119, 120, 206, 207, 208, 209, 210
*Nset, nset="MiddleRP Set"
 2,
*Nset, nset=MiddleSurface, instance=Stalk_7-pith-1, generate
 78,  83,   1
*Nset, nset=MiddleSurface, instance=Stalk_7-rind-1
  3,  4,  7,  8,  9, 10
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*Elset, elset=MiddleSurface, instance=Stalk_7-pith-1
 41, 42, 46, 51
*Elset, elset=MiddleSurface, instance=Stalk_7-rind-1
  2,  3,  5,  6,  8,  9
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*Nset, nset="Symmetry Geometry", instance=Stalk_7-pith-1, generate
  1,  83,   1
*Nset, nset="Symmetry Geometry", instance=Stalk_7-rind-1, generate
   1,  451,    1
*Nset, nset="Symmetry Geometry", generate
 1,  3,  1
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*Nset, nset=TopRP
 1,
*Nset, nset=TopUpperEdge, instance=Stalk_7-rind-1
  11, 130, 131, 132, 133, 134
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*Elset, elset=TopUpperEdge, instance=Stalk_7-rind-1, generate
 125,  210,    5
*Nset, nset=_PickedSet22, internal
 1,
*Elset, elset="_Inner Rind_S5", internal, instance=Stalk_7-rind-1, generate
  3,  30,   3
*Elset, elset="_Inner Rind_S1", internal, instance=Stalk_7-rind-1, generate
 121,  210,    1
*Elset, elset="_Inner Rind_S4", internal, instance=Stalk_7-rind-1, generate
  31,  120,    1
*Surface, type=ELEMENT, name="Inner Rind"
"_Inner Rind_S5", S5
"_Inner Rind_S1", S1
"_Inner Rind_S4", S4
*Elset, elset="_Outer Pith_S4", internal, instance=Stalk_7-pith-1
  2,  5,  8, 11, 14, 17, 20, 23, 26, 29, 32, 35, 37, 44
*Elset, elset="_Outer Pith_S3", internal, instance=Stalk_7-pith-1
  3,  6,  9, 12, 15, 18, 21, 24, 27, 30, 33, 36, 47, 50
*Elset, elset="_Outer Pith_S2", internal, instance=Stalk_7-pith-1
 39, 49
*Elset, elset="_Outer Pith_S1", internal, instance=Stalk_7-pith-1
 43, 52
*Surface, type=ELEMENT, name="Outer Pith"
"_Outer Pith_S4", S4
"_Outer Pith_S3", S3
"_Outer Pith_S2", S2
"_Outer Pith_S1", S1
*Elset, elset="_Outer Rind_S5", internal, instance=Stalk_7-rind-1, generate
  2,  29,   3
*Elset, elset="_Outer Rind_S6", internal, instance=Stalk_7-rind-1, generate
  31,  120,    1
*Elset, elset="_Outer Rind_S2", internal, instance=Stalk_7-rind-1, generate
 121,  210,    1
*Surface, type=ELEMENT, name="Outer Rind"
"_Outer Rind_S5", S5
"_Outer Rind_S6", S6
"_Outer Rind_S2", S2
*Elset, elset=__T0_Stalk_7-pith-1_M_S3, internal, instance=Stalk_7-pith-1
 37, 39, 40, 45
*Surface, type=ELEMENT, name=_T0_Stalk_7-pith-1_M, internal
__T0_Stalk_7-pith-1_M_S3, S3
*Nset, nset=_T0_Stalk_7-pith-1_SN, instance=Stalk_7-pith-1
 39,
*Surface, type=NODE, name=_T0_Stalk_7-pith-1_SN, internal
_T0_Stalk_7-pith-1_SN
*Tie, name=_T0_Stalk_7-pith-1-Nodes, adjust=no
_T0_Stalk_7-pith-1_SN, _T0_Stalk_7-pith-1_M
*Elset, elset=__T1_Stalk_7-pith-1_M_S2, internal, instance=Stalk_7-pith-1
 50, 52, 53
*Elset, elset=__T1_Stalk_7-pith-1_M_S1, internal, instance=Stalk_7-pith-1
 54,
*Surface, type=ELEMENT, name=_T1_Stalk_7-pith-1_M, internal
__T1_Stalk_7-pith-1_M_S2, S2
__T1_Stalk_7-pith-1_M_S1, S1
*Nset, nset=_T1_Stalk_7-pith-1_SN, instance=Stalk_7-pith-1
 56,
*Surface, type=NODE, name=_T1_Stalk_7-pith-1_SN, internal
_T1_Stalk_7-pith-1_SN
*Tie, name=_T1_Stalk_7-pith-1-Nodes, adjust=no
_T1_Stalk_7-pith-1_SN, _T1_Stalk_7-pith-1_M
** Constraint: ExtraRP
*Coupling, constraint name=ExtraRP, ref node="ExtraRP Set", surface="Outer Rind", influence radius=2.
*Distributing, weighting method=UNIFORM
** Constraint: MiddleRP
*Coupling, constraint name=MiddleRP, ref node="MiddleRP Set", surface="Outer Rind", influence radius=2.
*Distributing, weighting method=UNIFORM
** Constraint: PithtoRind
*Tie, name=PithtoRind, adjust=no
"Outer Pith", "Inner Rind"
** Constraint: TopRP
*Rigid Body, ref node=_PickedSet22, tie nset="Front Face"
*End Assembly
**
** MATERIALS
**
*Material, name=pith
*Elastic, type=ENGINEERING CONSTANTS
26.,    26.,   120.,  0.325, 0.0475, 0.0475, 9.8113,   14.4
   14.4,
*Material, name=rind
*Elastic, type=ENGINEERING CONSTANTS
850.,    850., 13081.7,   0.325,  0.0475,  0.0475, 320.755,  1569.8
  1569.8,
** ----------------------------------------------------------------
**
** STEP: BuckleStep
**
*Step, name=BuckleStep, nlgeom=NO, perturbation
*Buckle
2, , 4, 1000
**
** BOUNDARY CONDITIONS
**
** Name: Fix MiddleRP Type: Displacement/Rotation
*Boundary, op=NEW, load case=1
"MiddleRP Set", 1, 1
"MiddleRP Set", 2, 2
"MiddleRP Set", 3, 3
"MiddleRP Set", 4, 4
"MiddleRP Set", 5, 5
"MiddleRP Set", 6, 6
*Boundary, op=NEW, load case=2
"MiddleRP Set", 1, 1
"MiddleRP Set", 2, 2
"MiddleRP Set", 3, 3
"MiddleRP Set", 4, 4
"MiddleRP Set", 5, 5
"MiddleRP Set", 6, 6
** Name: Rotation Type: Displacement/Rotation
*Boundary, op=NEW, load case=1
MiddleSurface, 3, 3
MiddleSurface, 4, 4
MiddleSurface, 5, 5
MiddleSurface, 6, 6
*Boundary, op=NEW, load case=2
MiddleSurface, 3, 3
MiddleSurface, 4, 4
MiddleSurface, 5, 5
MiddleSurface, 6, 6
** Name: Symmetry Type: Symmetry/Antisymmetry/Encastre
*Boundary, op=NEW, load case=1
"Symmetry Geometry", XSYMM
*Boundary, op=NEW, load case=2
"Symmetry Geometry", XSYMM
**
** LOADS
**
** Name: TopForce   Type: Concentrated force
*Cload, op=NEW
TopRP, 2, 0.3548
** Name: TopMoment   Type: Moment
*Cload, op=NEW
TopRP, 4, -182.86
**
** OUTPUT REQUESTS
**
*Restart, write, frequency=0
**
** FIELD OUTPUT: F-Output-1
**
*Output, field
*Node Output
COORD, TF, U
*Element Output, directions=YES
COORD, IVOL, LE, S
*End Step
